<?xml version="1.0"?>
<?xml-stylesheet type="text/xsl" href="http://jsbsim.sourceforge.net/JSBSim.xsl"?>

<fdm_config name="B-1B" version="2.0" release="ALPHA"
   xmlns:xsi="http://www.w3.org/2001/XMLSchema-instance"
   xsi:noNamespaceSchemaLocation="http://jsbsim.sourceforge.net/JSBSim.xsd">

 <fileheader>
  <author> AeromatiC++ version 3.3.21 </author>
  <filecreationdate> 27 Oct 2023 </filecreationdate>
  <version>$Revision: 1.80 $</version>
  <description> Models a B-1B. </description>
 </fileheader>

<!--
  File:     B-1B.xml
  Input parameters:
    Output directory                   : ~/JSBSim
    Create a subdirectory?             : yes
    Overwrite?                         : yes
    Aircraft name                      : B-1B
    Use dedicates System files?        : yes
    Select a system of measurement     : no
    Type of aircraft                   : 2
    Stall speed VS1 (clean, no flaps)  : 127.00
    Maximum takeoff weight             : 477000.00
    Empty weight                       : 186807.00
    Inertia Ixx                        : 2289361.75
    Inertia Iyy                        : 3573887.00
    Inertia Izz                        : 4881551.50
    Length                             : 146.00
    Select a wing shape                : 0
    Wing span                          : 137.00
    Wing area                          : 1946.00
    Wing aspect ratio                  : 9.60
    Wing taper ratio                   : 0.35
    Wing root chord                    : 8.78
    Wing incidence                     : 0.00
    Wing dihedral                      : -1.94
    Wing sweep (quarter chord)         : 15.00
    Htail area                         : 509.00
    Htail arm                          : 48.08
    Vtail area                         : 247.40
    Vtail arm                          : 48.08
    Propulsion                         : yes
    Engine name                        : F101-GE-102
    Number of engines                  : 4
    Engine layout                      : 1
    Engine type                        : 2
    Engine mil. thrust                 : 17390.00
    Bypass ratio                       : 2.00
    Overall pressure ratio             : 26.80
    Augmented?                         : yes
    Water injection?                   : no
    Control system                     : 1
    Landing Gear                       : yes
    Is landing gear retractable?       : yes
    Nose or tail wheel type            : 0
    Is this a taildragger?             : no
    Flaps                              : yes
    Spoilers                           : yes
    Is the spoiler differential?       : yes
    Speedbrake                         : yes
    Arrestor Hook                      : no
    Chute                              : no
    Catapult                           : no

  Specifications:
    name:          B-1B
    type:          Multi-engine Fighter Jet
    stall speed:   127.00 kt
    max weight:    477000.00 lbs
    Fuselage:
     length:        146.00 ft
     diameter:      5.25 ft
     finess ratio:  27.81
    wing:
     span:         137.00 ft
     area:         1946.00 ft2
     mean chord:   8.78 ft
     aspect ratio: 9.60:1
     taper ratio:  0.35:1
     incidence:    0.00 degrees
     dihedral:     -1.94 degrees
     sweep:        15.00 degrees
     t/c:          22.15 %

    no. engines:   4
    engine type:   Turbine Engine
    engine layout: middle fuselage

    control type:   Conventional with Yaw Damper

    gear type:     tricycle
    steering type: steering
    retractable?:  yes

  Outputs:
    wing loading:       245.12 lbs/sq-ft
     - thickness ratio: 22.15%
    payload:            191454.00 lbs
    CL-alpha:           5.69 per radian
    CL-0:               0.90
    CL-max:             4.49
    CD-0:               0.01
    K:                  0.12
    Mcrit:              0.81

    min. turn radius    788.37 ft
    max. turn rate:     0.30 deg/s
-->

 <metrics>
   <wingarea  unit="FT2"> 1946.00  </wingarea>
   <wingspan  unit="FT" > 137.00   </wingspan>
   <wing_incidence unit="DEG"> 0.00 </wing_incidence>
   <chord     unit="FT" > 8.78     </chord>
   <htailarea unit="FT2"> 509.00   </htailarea>
   <htailarm  unit="FT" > 48.08    </htailarm>
   <vtailarea  unit="FT2">247.40   </vtailarea>
   <vtailarm  unit="FT" > 48.08    </vtailarm>
   <location name="AERORP" unit="FT">
     <x> 97.92    </x>
     <y> 0.00     </y>
     <z> 0.00     </z>
   </location>
   <location name="EYEPOINT" unit="FT">
     <x> 29.20    </x>
     <y> 0.00     </y>
     <z> 3.17     </z>
   </location>
   <location name="VRP" unit="FT">
     <x>     0.0 </x>
     <y>     0.0 </y>
     <z>     0.0 </z>
   </location>
 </metrics>

 <mass_balance>
   <ixx unit="SLUG*FT2">  2289361.75 </ixx>
   <iyy unit="SLUG*FT2">  3573887.00 </iyy>
   <izz unit="SLUG*FT2">  4881551.50 </izz>
   <emptywt unit="LBS" >  186807.00 </emptywt>
   <location name="CG" unit="FT">
     <x> 80    </x>
     <y> 0.00     </y>
     <z> -3.65    </z>
   </location>
   <pointmass name="Payload">
    <description> 191454.00 lbs should bring model up to entered max weight </description>
    <weight unit="LBS"> 95727.00 </weight>
    <location name="POINTMASS" unit="FT">
     <x> 80    </x>
     <y> 0.00     </y>
     <z> -3.65    </z>
   </location>
  </pointmass>
 </mass_balance>

 <propulsion>

   <engine file="F101-GE-102">
    <feed> 0 </feed>

    <thruster file="direct">
     <sense> 1 </sense>
     <location unit="FT">
       <x>    80 </x>
       <y>    -5.00 </y>
       <z>    -1.00 </z>
     </location>
     <orient unit="DEG">
       <pitch>     0.00 </pitch>
        <roll>     0.00 </roll>
         <yaw>     0.00 </yaw>
     </orient>
    </thruster>
  </engine>

   <engine file="F101-GE-102">
    <feed> 1 </feed>

    <thruster file="direct">
     <sense> 1 </sense>
     <location unit="FT">
       <x>    80 </x>
       <y>    -1.67 </y>
       <z>    -1.00 </z>
     </location>
     <orient unit="DEG">
       <pitch>     0.00 </pitch>
        <roll>     0.00 </roll>
         <yaw>     0.00 </yaw>
     </orient>
    </thruster>
  </engine>

   <engine file="F101-GE-102">
    <feed> 2 </feed>

    <thruster file="direct">
     <sense> 1 </sense>
     <location unit="FT">
       <x>    80 </x>
       <y>     1.67 </y>
       <z>    -1.00 </z>
     </location>
     <orient unit="DEG">
       <pitch>     0.00 </pitch>
        <roll>     0.00 </roll>
         <yaw>     0.00 </yaw>
     </orient>
    </thruster>
  </engine>

   <engine file="F101-GE-102">
    <feed> 3 </feed>

    <thruster file="direct">
     <sense> 1 </sense>
     <location unit="FT">
       <x>    80 </x>
       <y>     5.00 </y>
       <z>    -1.00 </z>
     </location>
     <orient unit="DEG">
       <pitch>     0.00 </pitch>
        <roll>     0.00 </roll>
         <yaw>     0.00 </yaw>
     </orient>
    </thruster>
  </engine>

 <!-- TODO: Position the APUs correctly -->
 <engine file="GTCP165-9A">
    <feed> 0 </feed>

    <thruster file="direct">
     <sense> 1 </sense>
     <location unit="FT">
       <x>    94.37 </x>
       <y>     0.00 </y>
       <z>    -1.00 </z>
     </location>
     <orient unit="DEG">
       <pitch>     0.00 </pitch>
        <roll>     0.00 </roll>
         <yaw>     0.00 </yaw>
     </orient>
    </thruster>
  </engine>
     <engine file="GTCP165-9A">
    <feed> 0 </feed>

    <thruster file="direct">
     <sense> 1 </sense>
     <location unit="FT">
       <x>    94.37 </x>
       <y>     0.00 </y>
       <z>    -1.00 </z>
     </location>
     <orient unit="DEG">
       <pitch>     0.00 </pitch>
        <roll>     0.00 </roll>
         <yaw>     0.00 </yaw>
     </orient>
    </thruster>
  </engine>

  <tank type="FUEL" number="0">
     <location unit="FT">
       <x>    80 </x>
       <y>     0.00 </y>
       <z>    -3.65 </z>
     </location>
     <capacity unit="LBS"> 19747.80 </capacity>
     <contents unit="LBS"> 9873.90 </contents>
  </tank>
  <tank type="FUEL" number="1">
     <location unit="FT">
       <x>    80 </x>
       <y>     0.00 </y>
       <z>    -3.65 </z>
     </location>
     <capacity unit="LBS"> 19747.80 </capacity>
     <contents unit="LBS"> 9873.90 </contents>
  </tank>
  <tank type="FUEL" number="2">
     <location unit="FT">
       <x>    80 </x>
       <y>     0.00 </y>
       <z>    -3.65 </z>
     </location>
     <capacity unit="LBS"> 19747.80 </capacity>
     <contents unit="LBS"> 9873.90 </contents>
  </tank>
  <tank type="FUEL" number="3">
     <location unit="FT">
       <x>    80 </x>
       <y>     0.00 </y>
       <z>    -3.65 </z>
     </location>
     <capacity unit="LBS"> 19747.80 </capacity>
     <contents unit="LBS"> 9873.90 </contents>
  </tank>
  <tank type="FUEL" number="4">
     <location unit="FT">
       <x>    80 </x>
       <y>     0.00 </y>
       <z>    -3.65 </z>
     </location>
     <capacity unit="LBS"> 19747.80 </capacity>
     <contents unit="LBS"> 9873.90 </contents>
  </tank>

 </propulsion>

 <ground_reactions>

  <contact type="BOGEY" name="NOSE">
    <location unit="FT">
      <x>    29.56 </x>
      <y>     0.00 </y>
      <z>   -14.337 </z>
    </location>
    <static_friction>  0.80 </static_friction>
    <dynamic_friction> 0.50 </dynamic_friction>
    <rolling_friction> 0.02 </rolling_friction>
    <spring_coeff  unit="LBS/FT">     150000.00 </spring_coeff>
    <damping_coeff unit="LBS/FT/SEC"> 85000.00 </damping_coeff>
    <max_steer unit="DEG"> 50.00 </max_steer>
    <brake_group> NONE </brake_group>
    <retractable> 1 </retractable>
  </contact>

  <contact type="BOGEY" name="LEFT_FRONT_MAIN">
    <location unit="FT">
      <x>    82.513 </x>
      <y>   -7.25 </y>
      <z>   -14.108 </z>
    </location>
    <static_friction>  0.80 </static_friction>
    <dynamic_friction> 0.50 </dynamic_friction>
    <rolling_friction> 0.02 </rolling_friction>
    <spring_coeff  unit="LBS/FT">     190800.00 </spring_coeff>
    <damping_coeff unit="LBS/FT/SEC"> 178875.00 </damping_coeff>
    <max_steer unit="DEG">0</max_steer>
    <brake_group> LEFT </brake_group>
    <retractable> 1 </retractable>
  </contact>

  <contact type="BOGEY" name="LEFT_AFT_MAIN">
    <location unit="FT">
      <x>    86.45 </x>
      <y>   -7.25 </y>
      <z>   -14.436 </z>
    </location>
    <static_friction>  0.80 </static_friction>
    <dynamic_friction> 0.50 </dynamic_friction>
    <rolling_friction> 0.02 </rolling_friction>
    <spring_coeff  unit="LBS/FT">     333900.00 </spring_coeff>
    <damping_coeff unit="LBS/FT/SEC"> 107325.00 </damping_coeff>
    <max_steer unit="DEG">0</max_steer>
    <brake_group> LEFT </brake_group>
    <retractable> 1 </retractable>
  </contact>

<!--  <contact type="BOGEY" name="RIGHT_MAIN">-->
<!--    <location unit="FT">-->
<!--      <x>    82.513 </x>-->
<!--      <y>    12.33 </y>-->
<!--      <z>   -14.337 </z>-->
<!--    </location>-->
<!--    <static_friction>  0.80 </static_friction>-->
<!--    <dynamic_friction> 0.50 </dynamic_friction>-->
<!--    <rolling_friction> 0.02 </rolling_friction>-->
<!--    <spring_coeff  unit="LBS/FT">     477000.00 </spring_coeff>-->
<!--    <damping_coeff unit="LBS/FT/SEC"> 238500.00 </damping_coeff>-->
<!--    <max_steer unit="DEG">0</max_steer>-->
<!--    <brake_group> RIGHT </brake_group>-->
<!--    <retractable> 1 </retractable>-->
<!--  </contact>-->
  <contact type="BOGEY" name="RIGHT_FRONT_MAIN">
    <location unit="FT">
      <x>    82.513 </x>
      <y>   7.25 </y>
      <z>   -14.108 </z>
    </location>
    <static_friction>  0.80 </static_friction>
    <dynamic_friction> 0.50 </dynamic_friction>
    <rolling_friction> 0.02 </rolling_friction>
    <spring_coeff  unit="LBS/FT">     190800.00 </spring_coeff>
    <damping_coeff unit="LBS/FT/SEC"> 178875.00 </damping_coeff>
    <max_steer unit="DEG">0</max_steer>
    <brake_group> LEFT </brake_group>
    <retractable> 1 </retractable>
  </contact>

  <contact type="BOGEY" name="RIGHT_AFT_MAIN">
    <location unit="FT">
      <x>    86.45 </x>
      <y>   7.25 </y>
      <z>   -14.436 </z>
    </location>
    <static_friction>  0.80 </static_friction>
    <dynamic_friction> 0.50 </dynamic_friction>
    <rolling_friction> 0.02 </rolling_friction>
    <spring_coeff  unit="LBS/FT">     333900.00 </spring_coeff>
    <damping_coeff unit="LBS/FT/SEC"> 107325.00 </damping_coeff>
    <max_steer unit="DEG">0</max_steer>
    <brake_group> LEFT </brake_group>
    <retractable> 1 </retractable>
  </contact>


  <contact type="STRUCTURE" name="LEFT_WING">
    <location unit="FT">
     <x>    80 </x>
     <y>   -68.50 </y>
     <z>    -3.65 </z>
    </location>
   <static_friction>  1 </static_friction>
   <dynamic_friction> 1 </dynamic_friction>
    <spring_coeff  unit="LBS/FT">     477000.00 </spring_coeff>
    <damping_coeff unit="LBS/FT/SEC"> 238500.00 </damping_coeff>
  </contact>

  <contact type="STRUCTURE" name="RIGHT_WING">
    <location unit="FT">
     <x>    80 </x>
     <y>    68.50 </y>
     <z>    -3.65 </z>
    </location>
   <static_friction>  1 </static_friction>
   <dynamic_friction> 1 </dynamic_friction>
    <spring_coeff  unit="LBS/FT">     477000.00 </spring_coeff>
    <damping_coeff unit="LBS/FT/SEC"> 238500.00 </damping_coeff>
  </contact>

 </ground_reactions>

 <system file="Propulsion.xml"/>
 <system file="Aircraft control.xml"/>
 <system file="Landing Gear.xml"/>
 <system file="Flaps.xml"/>
 <system file="Spoilers.xml"/>
 <system file="Speedbrake.xml"/>
    <system file="eng_ind.xml"/>
    <system file="b1b-engines.xml"/>
    <system file="b1b-pneumatic.xml"/>
    <system file="b1b-electrical.xml"/>
    <system file="b1b-hydraulics.xml"/>
    <system file="b1b-failures.xml"/>
    <system file="autopilot.xml"/>
<!--    <system file="b1b-apu.xml"/>-->

 <flight_control name="FCS: B-1B">

 </flight_control>

 <aerodynamics>

  <axis name="LIFT">

    <!-- Lift above 0.85 and below -0.85 is generalised -->
    <function name="aero/force/Lift_alpha">
      <description>Lift due to alpha</description>
      <product>
          <property>aero/qbar-psf</property>
          <property>metrics/Sw-sqft</property>
          <table>
            <independentVar lookup="row">aero/alpha-rad</independentVar>
            <tableData>
              -1.57  0.0000
              -1.22 -0.5004
              -1.05 -0.6742
              -0.88 -0.7785
              -0.63 -0.8957
               0.00  0.8999
               0.79  4.4889
               0.88  1.2215
               0.95  1.7956
               1.05  1.0578
               1.22  0.7852
               1.57  0.0000
            </tableData>
          </table>
      </product>
    </function>

    <function name="aero/force/Lift_pitch_rate">
        <description>Lift due to pitch rate</description>
        <product>
          <property>aero/qbar-psf</property>
          <property>metrics/Sw-sqft</property>
          <property>velocities/q-aero-rad_sec</property>
          <property>aero/ci2vel</property>
          <value> 11.9597 </value>
        </product>
      </function>

      <function name="aero/force/Lift_alpha_rate">
        <description>Lift due to alpha rate</description>
        <product>
           <property>aero/qbar-psf</property>
           <property>metrics/Sw-sqft</property>
           <property>aero/alphadot-rad_sec</property>
           <property>aero/ci2vel</property>
           <value> 4.1240 </value>
        </product>
      </function>

    <function name="aero/force/Lift_elevator">
       <description>Lift due to Elevator Deflection</description>
       <product>
           <property>aero/qbar-psf</property>
           <property>metrics/Sw-sqft</property>
           <property>fcs/elevator-pos-rad</property>
           <value> 0.7015 </value>
       </product>
    </function>

    <function name="aero/force/Lift_flap">
       <description>Delta Lift due to flaps</description>
       <product>
           <property>aero/qbar-psf</property>
           <property>metrics/Sw-sqft</property>
           <property>fcs/flap-pos-deg</property>
           <value> 0.0105 </value>
       </product>
    </function>


    <function name="aero/force/Lift_spoilers">
       <description>Delta Lift due to spoilers</description>
       <product>
           <property>aero/qbar-psf</property>
           <property>metrics/Sw-sqft</property>
           <property>fcs/spoilers-pos-norm</property>
           <value> 0.0000 </value>
       </product>
    </function>

  </axis>

  <axis name="DRAG">

    <!-- CD0 is based on fuselage, wing, horizontal- en vertical tail -->
    <!-- CD for gear (fixed and retractable) is defined below         -->
    <function name="aero/force/Drag_minimum">
       <description>Minimum drag</description>
       <product>
          <property>aero/qbar-psf</property>
          <property>metrics/Sw-sqft</property>
          <value> 0.0111 </value>
       </product>
    </function>

    <function name="aero/force/Drag_alpha">
       <description>Drag due to alpha</description>
       <product>
          <property>aero/qbar-psf</property>
          <property>metrics/Sw-sqft</property>
          <table>
            <independentVar lookup="row">aero/alpha-rad</independentVar>
            <tableData>
             -1.57    1.4082
             -0.63    0.2564
              0.00    0.0000
              0.63    0.2564
              1.57    1.4082
            </tableData>
          </table>
       </product>
    </function>

    <function name="aero/force/Drag_induced">
       <description>Induced drag</description>
         <product>
           <property>aero/qbar-psf</property>
           <property>metrics/Sw-sqft</property>
           <property>aero/cl-squared</property>
           <value> 0.0397 </value>
         </product>
    </function>

    <function name="aero/force/Drag_mach">
       <description>Drag due to mach</description>
        <product>
          <property>aero/qbar-psf</property>
          <property>metrics/Sw-sqft</property>
          <table>
            <independentVar lookup="row">velocities/mach</independentVar>
            <tableData>
                0.00    0.0000
                0.81    0.0000
                1.10    0.0230
                1.80    0.0150
            </tableData>
          </table>
        </product>
    </function>

    <function name="aero/force/Drag_beta">
       <description>Drag due to sideslip</description>
       <product>
          <property>aero/qbar-psf</property>
          <property>metrics/Sw-sqft</property>
          <table>
            <independentVar lookup="row">aero/beta-rad</independentVar>
            <tableData>
              -1.57    1.2300
              -0.26    0.0500
               0.00    0.0000
               0.26    0.0500
               1.57    1.2300
            </tableData>
          </table>
       </product>
    </function>

    <function name="aero/force/Drag_elevator">
       <description>Drag due to Elevator Deflection</description>
       <product>
           <property>aero/qbar-psf</property>
           <property>metrics/Sw-sqft</property>
           <abs><property>fcs/elevator-pos-rad</property></abs>
           <value> 0.0400 </value>
       </product>
    </function>

    <function name="aero/force/Drag_gear">
       <description>Drag due to gear</description>
         <product>
           <property>aero/qbar-psf</property>
           <property>metrics/Sw-sqft</property>
           <property>gear/gear-pos-norm</property>
           <value> 0.0200 </value>
         </product>
    </function>

    <function name="aero/force/Drag_flap">
       <description>Drag due to flaps</description>
         <product>
           <property>aero/qbar-psf</property>
           <property>metrics/Sw-sqft</property>
           <property>fcs/flap-pos-deg</property>
           <value> 0.0023 </value>
         </product>
    </function>


    <function name="aero/force/Drag_spoilers">
       <description>Drag due to spoilers</description>
         <product>
           <property>aero/qbar-psf</property>
           <property>metrics/Sw-sqft</property>
           <property>fcs/spoilers-pos-norm</property>
           <value> 0.0111 </value>
         </product>
    </function>

    <function name="aero/force/Drag_speedbrake">
       <description>Drag due to speedbrakes</description>
         <product>
           <property>aero/qbar-psf</property>
           <property>metrics/Sw-sqft</property>
           <property>fcs/speedbrake-pos-norm</property>
           <value> 0.0800 </value>
         </product>
    </function>

  </axis>

  <axis name="SIDE">

    <function name="aero/force/Side_beta">
       <description>Side force due to beta</description>
       <product>
           <property>aero/qbar-psf</property>
           <property>metrics/Sw-sqft</property>
           <property>aero/beta-rad</property>
           <value> -0.6061 </value>
       </product>
    </function>
    <function name="aero/force/Side_roll_rate">
       <description>Side force due to roll rate</description>
       <product>
           <property>aero/qbar-psf</property>
           <property>metrics/Sw-sqft</property>
           <property>aero/bi2vel</property>
           <property>velocities/p-aero-rad_sec</property>
           <table>
             <independentVar lookup="row">aero/Re</independentVar>
             <tableData>
                11998485      0.8503
                13198333      0.0674
                17997728      0.0300
                23864164      0.0170
             </tableData>
           </table>
       </product>
    </function>

    <function name="aero/force/Side_yaw_rate">
       <description>Side force due to yaw rate</description>
       <product>
           <property>aero/qbar-psf</property>
           <property>metrics/Sw-sqft</property>
           <property>aero/bi2vel</property>
           <property>velocities/r-aero-rad_sec</property>
           <value> 0.4254 </value>
       </product>
    </function>

    <function name="aero/force/Side_rudder">
       <description>Side force due to rudder</description>
       <product>
           <property>aero/qbar-psf</property>
           <property>metrics/Sw-sqft</property>
           <property>fcs/rudder-pos-rad</property>
           <value> 0.1788 </value>
       </product>
    </function>

  </axis>

  <axis name="PITCH">

    <function name="aero/moment/Pitch_alpha">
       <description>Pitch moment due to alpha</description>
       <product>
           <property>aero/qbar-psf</property>
           <property>metrics/Sw-sqft</property>
           <property>metrics/cbarw-ft</property>
           <property>aero/alpha-rad</property>
           <value> -1.9881 </value>
       </product>
    </function>

    <function name="aero/moment/Pitch_elevator">
       <description>Pitch moment due to elevator</description>
       <product>
          <property>aero/qbar-psf</property>
          <property>metrics/Sw-sqft</property>
          <property>metrics/cbarw-ft</property>
          <property>fcs/elevator-pos-rad</property>
          <table>
            <independentVar lookup="row">velocities/mach</independentVar>
            <tableData>
              0.0    -3.7811
              2.0    -0.9453
            </tableData>
          </table>
       </product>
    </function>

    <function name="aero/moment/Pitch_damp">
       <description>Pitch moment due to pitch rate</description>
       <product>
           <property>aero/qbar-psf</property>
           <property>metrics/Sw-sqft</property>
           <property>metrics/cbarw-ft</property>
           <property>aero/ci2vel</property>
           <property>velocities/q-aero-rad_sec</property>
           <value> -65.4615 </value>
       </product>
    </function>

    <function name="aero/moment/Pitch_alphadot">
       <description>Pitch moment due to alpha rate</description>
       <product>
           <property>aero/qbar-psf</property>
           <property>metrics/Sw-sqft</property>
           <property>metrics/cbarw-ft</property>
           <property>aero/ci2vel</property>
           <property>aero/alphadot-rad_sec</property>
           <value> -22.5729 </value>
       </product>
    </function>

  </axis>

  <axis name="ROLL">

    <function name="aero/moment/Roll_beta">
       <description>Roll moment due to beta</description>
       <product>
           <property>aero/qbar-psf</property>
           <property>metrics/Sw-sqft</property>
           <property>metrics/bw-ft</property>
           <property>aero/beta-rad</property>
           <property>fcs/gear-no-wow</property>
           <table>
             <independentVar lookup="row">aero/alpha-rad</independentVar>
             <independentVar lookup="column">aero/Re</independentVar>
             <tableData>
                            11998485    13198333    17997728    23864164
                 -0.0349     -0.2505     -0.0260     -0.0211     -0.0312
                  0.3491     -3.0053     -0.2084     -0.1788     -0.2319
             </tableData>
           </table>
       </product>
    </function>

    <function name="aero/moment/Roll_damp">
       <description>Roll moment due to roll rate</description>
       <product>
           <property>aero/qbar-psf</property>
           <property>metrics/Sw-sqft</property>
           <property>metrics/bw-ft</property>
           <property>aero/bi2vel</property>
           <property>velocities/p-aero-rad_sec</property>
           <value> -0.3937 </value>
       </product>
    </function>

    <function name="aero/moment/Roll_yaw">
       <description>Roll moment due to yaw rate</description>
       <product>
           <property>aero/qbar-psf</property>
           <property>metrics/Sw-sqft</property>
           <property>metrics/bw-ft</property>
           <property>aero/bi2vel</property>
           <property>velocities/r-aero-rad_sec</property>
           <table>
             <independentVar lookup="row">aero/alpha-rad</independentVar>
             <independentVar lookup="column">aero/Re</independentVar>
             <tableData>
                            11998485    13198333    17997728    23864164
                 -0.0349      0.1722      0.1722      0.1722      0.1722
                  0.3491     11.2192      0.8868      0.7186      0.7186
             </tableData>
           </table>
       </product>
    </function>

    <function name="aero/moment/Roll_aileron">
       <description>Roll moment due to aileron</description>
       <product>
          <property>aero/qbar-psf</property>
          <property>metrics/Sw-sqft</property>
          <property>metrics/bw-ft</property>
          <property>fcs/left-aileron-pos-rad</property>
           <table>
            <independentVar lookup="row">velocities/mach</independentVar>
            <tableData>
              0.0    0.1200
              2.0    0.0300
            </tableData>
          </table>
       </product>
    </function>

    <function name="aero/moment/Roll_rudder">
       <description>Roll moment due to rudder</description>
       <product>
           <property>aero/qbar-psf</property>
           <property>metrics/Sw-sqft</property>
           <property>metrics/bw-ft</property>
           <property>fcs/rudder-pos-rad</property>
           <value> 0.0100 </value>
       </product>
    </function>

    <function name="aero/moment/Roll_spoilers">
       <description>Roll moment due to spoilers</description>
       <product>
          <property>aero/qbar-psf</property>
          <property>metrics/Sw-sqft</property>
          <property>metrics/bw-ft</property>
          <property>fcs/spoilers-pos-norm</property>
          <property>fcs/left-aileron-pos-rad</property>
          <table>
            <independentVar lookup="row">aero/alpha-rad</independentVar>
            <tableData>
             -0.175   0.0000
              0.0     0.2400
              0.175   0.0000
            </tableData>
          </table>
       </product>
    </function>

  </axis>

  <axis name="YAW">

    <!-- Stall initiator -->
    <function name="aero/moment/Yaw_alpha">
       <description>Yaw moment due to alpha</description>
       <product>
           <property>aero/qbar-psf</property>
           <property>metrics/Sw-sqft</property>
           <property>metrics/bw-ft</property>
           <property>aero/alpha-rad</property>
           <property>fcs/gear-no-wow</property>
           <table>
             <independentVar lookup="row">aero/beta-rad</independentVar>
             <independentVar lookup="column">aero/Re</independentVar>
             <tableData>
                            11998485    13198333
                 -0.3491     -1.0000      0.0000
                  0.3491      1.0000      0.0000
             </tableData>
           </table>
       </product>
    </function>

    <function name="aero/moment/Yaw_beta">
       <description>Yaw moment due to beta</description>
       <product>
           <property>aero/qbar-psf</property>
           <property>metrics/Sw-sqft</property>
           <property>metrics/bw-ft</property>
           <property>aero/beta-rad</property>
           <value> 0.1022 </value>
       </product>
    </function>

    <function name="aero/moment/Yaw_roll_rate">
       <description>Yaw moment due to roll rate</description>
       <product>
           <property>aero/qbar-psf</property>
           <property>metrics/Sw-sqft</property>
           <property>metrics/bw-ft</property>
           <property>aero/bi2vel</property>
           <property>velocities/p-rad_sec</property>
           <table>
             <independentVar lookup="row">aero/Re</independentVar>
             <tableData>
                11998485     -0.2984
                13198333     -0.0237
                17997728     -0.0105
                23864164     -0.0060
             </tableData>
           </table>
       </product>
    </function>

    <function name="aero/moment/Yaw_damp">
       <description>Yaw moment due to yaw rate</description>
       <product>
           <property>aero/qbar-psf</property>
           <property>metrics/Sw-sqft</property>
           <property>metrics/bw-ft</property>
           <property>aero/bi2vel</property>
           <property>velocities/r-aero-rad_sec</property>
           <value> -0.1390 </value>
       </product>
    </function>

    <function name="aero/moment/Yaw_rudder">
       <description>Yaw moment due to rudder</description>
       <product>
           <property>aero/qbar-psf</property>
           <property>metrics/Sw-sqft</property>
           <property>metrics/bw-ft</property>
           <property>fcs/rudder-pos-rad</property>
           <value> -0.0628 </value>
       </product>
    </function>

    <function name="aero/moment/Yaw_aileron">
       <description>Adverse yaw</description>
       <product>
           <property>aero/qbar-psf</property>
           <property>metrics/Sw-sqft</property>
           <property>metrics/bw-ft</property>
           <property>fcs/left-aileron-pos-rad</property>
           <value> 0.0000 </value>
       </product>
    </function>

  </axis>

 </aerodynamics>

 <external_reactions>
 </external_reactions>


</fdm_config>
